# Validate the Akgun-Ugur (PRB 51, 3458) pair potential: pure fcc Pd at a = 3.8720 A
# Expected:  PE/atom = -1.0999 eV   and   Pxx=Pyy=Pzz ~ 0  (the fit imposes both)
units           metal
atom_style      atomic
boundary        p p p

lattice         fcc 3.8720
region          box block 0 5 0 5 0 5
create_box      1 box
create_atoms    1 box
mass            1 106.42

pair_style      table linear 15000
pair_coeff      1 1 AkgunUgur1995.table Pd_Pd 7.80

thermo_style    custom step pe etotal press pxx pyy pzz vol
run             0

variable        peat equal pe/atoms
print           "PE per atom  = ${peat} eV      (target -1.0999)"
print           "Pressure     = $(press) bar    (target ~0)"

# equilibrium lattice constant from a quick volume relaxation
fix             1 all box/relax iso 0.0 vmax 0.001
min_style       cg
minimize        1e-12 1e-14 2000 20000
variable        arel equal (vol/count(all)*4)^(1/3)
print           "relaxed a    = ${arel} Ang      (target 3.8720)"
print           "relaxed PE/atom = $(pe/atoms) eV"
